<?xml version="1.0"?>
<!--
File:     TSIO-550K.xml
Author:   Aero-Matic v 0.83

Inputs:
name:           TSIO-550K
type:           piston
power:          315 hp
augmented?      no
injected?       no

data according to http://www.continentalmotors.aero/uploadedFiles/Content/xHome/Billboards/500series_032012.pdf

bore: 5.25
stroke: 4.25
compression ratio: 7.5
max hp: 315 at 2500 RPM
-->

<piston_engine name="TSIO-550K">
	<minmp unit="INHG">         10.0 </minmp>
	<maxmp unit="INHG">         29.5 </maxmp>
	<displacement unit="IN3"> 550 </displacement>
	<maxhp>        315.00 </maxhp>
	<cycles>         4.0 </cycles>
	<idlerpm>      700.0 </idlerpm>
	<maxrpm>      2500.0 </maxrpm>
	<sparkfaildrop>  0.1 </sparkfaildrop>
	<man-press-lag> 0.1 </man-press-lag>
	<static-friction  unit="HP"> 1.57 </static-friction>
	<starter-torque> 252.00 </starter-torque>
	<starter-rpm> 1400 </starter-rpm>

	<stroke unit="IN">  4.25 </stroke>
	<bore unit="IN">    5.25 </bore>
	<cylinders>        6.0  </cylinders>
	<compression-ratio>  7.5 </compression-ratio>
	<volumetric-efficiency> 1.05 </volumetric-efficiency>
	<bsfc unit="LBS/HP*HR">           0.5683 </bsfc> <!--18.3 gallons per hour at 85% power = 113.46 lbs (AVGAS) per hour at 267.75 hp-->
	<air-intake-impedance-factor>0.18</air-intake-impedance-factor>
	<ram-air-factor>0.1</ram-air-factor>

	<numboostspeeds>1</numboostspeeds>
	<boostoverride>0</boostoverride>
	<boost-loss-factor>1.2</boost-loss-factor>
	<ratedboost1 unit="INHG">6.58</ratedboost1>
	<ratedpower1>315</ratedpower1>
	<ratedaltitude1>18000</ratedaltitude1>
	<ratedrpm1>2500</ratedrpm1>
</piston_engine>
